<?xml version="1.0"?>

<propeller name="Clark Y 0.10 t/c ratio, fixed pitch">
  <ixx> 1.84756 </ixx>
  <diameter unit="IN"> 76 </diameter>
  <numblades> 2 </numblades>
  <gearratio>0.85</gearratio>
  <minpitch> 19 </minpitch>
  <maxpitch> 19 </maxpitch>
<ct_factor>1.9</ct_factor>
<cp_factor>2.1</cp_factor>
  <table name="C_THRUST" type="internal">
    <tableData>
	0.10	0.0910
	0.15	0.0910
	0.20	0.0900
	0.25	0.0884
	0.30	0.0860
	0.35	0.0832
	0.40	0.0801
	0.45	0.0757
	0.50	0.0708
	0.55	0.0655
	0.60	0.0591
	0.65	0.0520
	0.70	0.0450
	0.75	0.0368
	0.80	0.0294
	0.85	0.0224
	0.90	-0.0010
	0.95	-0.0095
	1.00	-0.0170
	1.05	-0.0255
	1.10	-0.0330
	1.15	-0.0395
	1.20	-0.0460
	1.25	-0.0525
	1.30	-0.0580
	1.35	-0.0630
	1.40	-0.0670
	1.45	-0.0750
	1.50	-0.0790
	1.55	-0.0800
      </tableData>
    </table>

  <table name="C_POWER" type="internal">
    <tableData>
	0.10	0.0520
	0.15	0.0521
	0.20	0.0523
	0.25	0.0525
	0.30	0.0526
	0.35	0.0527
	0.40	0.0528
	0.45	0.0523
	0.50	0.0513
	0.55	0.0498
	0.60	0.0472
	0.65	0.0436
	0.70	0.0394
	0.75	0.0345
	0.80	0.0294
	0.85	0.0238
	0.90	0.0120
	0.95	0.0100
	1.00	0.0120
	1.05	0.0180
	1.10	0.0238
	1.15	0.0294
	1.20	0.0345
	1.25	0.0394
	1.30	0.0436
	1.35	0.0472
	1.45	0.0498
	1.55	0.0513
    </tableData>
  </table>

</propeller>
