<?xml version="1.0"?>
<!--
  Textron-Lycoming IO-360-C(1G6) for JSBSim

    Copyright (C) 2004 - 2009  JSBSim
    Copyright (C) 2009  Anders Gidenstam  (anders(at)gidenstam.org)
    This file is licensed under the GPL license version 2 or later.

  <reference
   refID="FAA:2009:TCDS-1E10"
   author="FAA"
   title="http://rgl.faa.gov/Regulatory_and_Guidance_library/rgMakeModel.nsf/0/450619753f0fec87862575e6004f3dac/$FILE/1E10.pdf"
   date="28 January 2009"/>

-->
<piston_engine name="IO-360-C*">
  <displacement unit="IN3"> 361.01 </displacement>
  <bore unit="IN">           5.125 </bore>
  <stroke unit="IN">         4.375 </stroke>
  <compression-ratio>         8.70 </compression-ratio>
  <cylinders>                 4.00 </cylinders>
  <cycles>                    4.00 </cycles>

  <maxhp>                   200.0  </maxhp>
  <!--bsfc>                      0.37 </bsfc-->
  <!--volumetric-efficiency>     0.85 </volumetric-efficiency -->
  <idlerpm>                 550.0  </idlerpm>
  <maxrpm>                 2700.0  </maxrpm>

  <sparkfaildrop>             0.1 </sparkfaildrop>

  <minmp unit="INHG">         6.5 </minmp>	<!-- Deprecated -->
  <maxmp unit="INHG">        28.5 </maxmp>
  <maxthrottle>               1.0  </maxthrottle>
  <minthrottle>               0.1  </minthrottle>
</piston_engine>
